// SBML level 3 version 1

model midazolam_body_flat()
  // model units - substance: mmole, time: min, volume: litre, area: m2, length: m, extent: mmole

  // Compartments:
  compartment Vre; Vre has litre; Vre is "rest of body";
  compartment Vgu; Vgu has litre; Vgu is "gut";
  compartment Vki; Vki has litre; Vki is "kidney";
  compartment Vli; Vli has litre; Vli is "liver";
  compartment Vlu; Vlu has litre; Vlu is "lung";
  compartment Vsp; Vsp has litre; Vsp is "spleen";
  compartment Vpa; Vpa has litre; Vpa is "pancreas";
  compartment Vve; Vve has litre; Vve is "venous blood";
  compartment Var; Var has litre; Var is "arterial blood";
  compartment Vurine = 1 litre;
  compartment Vgu_tissue; Vgu_tissue has litre;
  compartment Vgu_blood; Vgu_blood has litre;
  compartment Vki_tissue; Vki_tissue has litre;
  compartment Vki_blood; Vki_blood has litre;
  compartment Vli_tissue; Vli_tissue has litre;
  compartment Vli_blood; Vli_blood has litre;
  compartment Vlu_tissue; Vlu_tissue has litre;
  compartment Vlu_blood; Vlu_blood has litre;
  compartment Vpa_tissue; Vpa_tissue has litre;
  compartment Vpa_blood; Vpa_blood has litre;
  compartment Vsp_tissue; Vsp_tissue has litre;
  compartment Vsp_blood; Vsp_blood has litre;
  compartment Vre_tissue; Vre_tissue has litre;
  compartment Vre_blood; Vre_blood has litre;
  compartment KI__Vurine = 1 litre;

  // Species:
  species Cgu_blood_mid in Vgu_blood = 0; Cgu_blood_mid is "midazolam (gut)";
  species Cki_blood_mid in Vki_blood = 0; Cki_blood_mid is "midazolam (kidney)";
  species Cli_blood_mid in Vli_blood = 0; Cli_blood_mid is "midazolam (liver)";
  species Clu_blood_mid in Vlu_blood = 0; Clu_blood_mid is "midazolam (lung)";
  species Cpa_blood_mid in Vpa_blood = 0; Cpa_blood_mid is "midazolam (pancreas)";
  species Csp_blood_mid in Vsp_blood = 0; Csp_blood_mid is "midazolam (spleen)";
  species Cre_blood_mid in Vre_blood = 0; Cre_blood_mid is "midazolam (rest)";
  species Car_mid in Var = 0; Car_mid is "midazolam (arterial blood)";
  species Cve_mid in Vve = 0; Cve_mid is "midazolam (venous blood)";
  species Clu_mid in Vlu_tissue = 0; Clu_mid is "midazolam (lung)";
  species Cpa_mid in Vpa_tissue = 0; Cpa_mid is "midazolam (pancreas)";
  species Csp_mid in Vsp_tissue = 0; Csp_mid is "midazolam (spleen)";
  species Cre_mid in Vre_tissue = 0; Cre_mid is "midazolam (rest)";
  substanceOnly species Aurine_mid in Vurine = 0; Aurine_mid is "midazolam (urine)";
  species Cgu_blood_mid1oh in Vgu_blood = 0; Cgu_blood_mid1oh is "1-hydroxymidazolam (gut)";
  species Cki_blood_mid1oh in Vki_blood = 0; Cki_blood_mid1oh is "1-hydroxymidazolam (kidney)";
  species Cli_blood_mid1oh in Vli_blood = 0; Cli_blood_mid1oh is "1-hydroxymidazolam (liver)";
  species Clu_blood_mid1oh in Vlu_blood = 0; Clu_blood_mid1oh is "1-hydroxymidazolam (lung)";
  species Cpa_blood_mid1oh in Vpa_blood = 0; Cpa_blood_mid1oh is "1-hydroxymidazolam (pancreas)";
  species Csp_blood_mid1oh in Vsp_blood = 0; Csp_blood_mid1oh is "1-hydroxymidazolam (spleen)";
  species Cre_blood_mid1oh in Vre_blood = 0; Cre_blood_mid1oh is "1-hydroxymidazolam (rest)";
  species Car_mid1oh in Var = 0; Car_mid1oh is "1-hydroxymidazolam (arterial blood)";
  species Cve_mid1oh in Vve = 0; Cve_mid1oh is "1-hydroxymidazolam (venous blood)";
  species Clu_mid1oh in Vlu_tissue = 0; Clu_mid1oh is "1-hydroxymidazolam (lung)";
  species Cpa_mid1oh in Vpa_tissue = 0; Cpa_mid1oh is "1-hydroxymidazolam (pancreas)";
  species Csp_mid1oh in Vsp_tissue = 0; Csp_mid1oh is "1-hydroxymidazolam (spleen)";
  species Cre_mid1oh in Vre_tissue = 0; Cre_mid1oh is "1-hydroxymidazolam (rest)";
  substanceOnly species Aurine_mid1oh in Vurine = 0; Aurine_mid1oh is "1-hydroxymidazolam (urine)";
  species LI__mid in Vli_tissue = 0; LI__mid is "midazolam";
  species LI__mid1oh in Vli_tissue = 0; LI__mid1oh is "1-hydroxy-midazolam";
  species GU__mid in Vgu_tissue = 0; GU__mid is "midazolam (intestine)";
  species GU__mid1oh in Vgu_tissue = 0; GU__mid1oh is "1-hydroxy-midazolam (intestine)";

  // Parameters:
  conversion_ml_per_l = 1000 ml_per_l; conversion_ml_per_l is "volume conversion factor";
  conversion_l_per_ml = 0.001 l_per_ml; conversion_l_per_ml is "volume conversion factor";
  BW = 75 kg; BW is "body weight [kg]";
  HEIGHT = 170 cm; HEIGHT is "height [cm]";
  HR = 70 per_min; HR is "heart rate [1/min]";
  HRrest = 70 per_min; HRrest is "heart rate [1/min]";
  BSA has m2; BSA is "body surface area [m^2]";
  COBW = 1.548 ml_per_s_kg; COBW is "cardiac output per bodyweight [ml/s/kg]";
  CO has ml_per_s; CO is "cardiac output [ml/s]";
  QC has l_per_min; QC is "cardiac output [L/hr]";
  COHRI = 150 ml; COHRI is "increase of cardiac output per heartbeat [ml/min*min]";
  Fblood = 0.02 dimensionless; Fblood is "blood fraction of organ volume";
  FVgu = 0.0171 l_per_kg; FVgu is "gut fractional tissue volume";
  FVki = 0.0044 l_per_kg; FVki is "kidney fractional tissue volume";
  FVli = 0.021 l_per_kg; FVli is "liver fractional tissue volume";
  FVlu = 0.0076 l_per_kg; FVlu is "lung fractional tissue volume";
  FVsp = 0.0026 l_per_kg; FVsp is "spleen fractional tissue volume";
  FVpa = 0.01 l_per_kg; FVpa is "pancreas fractional tissue volume";
  FVre has l_per_kg; FVre is "rest of body fractional tissue volume";
  FVve = 0.0514 l_per_kg; FVve is "venous fractional tissue volume";
  FVar = 0.0257 l_per_kg; FVar is "arterial fractional tissue volume";
  FQgu = 0.146 dimensionless; FQgu is "gut fractional tissue blood flow";
  FQki = 0.19 dimensionless; FQki is "kidney fractional tissue blood flow";
  FQh = 0.215 dimensionless; FQh is "hepatic (venous side) fractional tissue blood flow";
  FQlu = 1 dimensionless; FQlu is "lung fractional tissue blood flow";
  FQsp = 0.017 dimensionless; FQsp is "spleen fractional tissue blood flow";
  FQpa = 0.017 dimensionless; FQpa is "pancreas fractional tissue blood flow";
  FQre has dimensionless; FQre is "rest of body fractional tissue blood flow";
  MIDOH_Km = 0.01 mM;
  Mr_mid = 325.768 g_per_mole; Mr_mid is "Molecular weight mid [g/mole]";
  ftissue_mid = 916.0449 l_per_min; ftissue_mid is "tissue distribution mid";
  fup_mid = 0.0235 dimensionless; fup_mid is "fraction unbound in plasma mid";
  BP_mid = 1 dimensionless; BP_mid is "blood to plasma ratio mid";
  IVDOSE_mid = 0 mg; IVDOSE_mid is "IV bolus dose mid [mg]";
  ti_mid = 10 s; ti_mid is "injection time mid [s]";
  Ki_mid has per_min; Ki_mid is "Ki [1/min] injection mid";
  Ri_mid = 0 mg_per_min; Ri_mid is "Ri [mg/min] rate of infusion mid";
  cum_dose_mid = 0 mg; cum_dose_mid is "Cumulative dose due to infusion mid";
  PODOSE_mid = 0 mg; PODOSE_mid is "oral dose mid [mg]";
  GUTDOSE_mid = 0 mg; GUTDOSE_mid is "dose dissolved in gut mid [mg]";
  Ka_dis_mid = 2.408651 per_hr; Ka_dis_mid is "Ka_dis [1/hr] dissolution mid";
  Ka_abs_mid = 4.463102 per_hr; Ka_abs_mid is "Ka_abs [1/hr] absorption mid";
  F_mid = 1 dimensionless; F_mid is "fraction absorbed mid";
  Mr_mid1oh = 341.8 g_per_mole; Mr_mid1oh is "Molecular weight mid1oh [g/mole]";
  ftissue_mid1oh = 0.1124321 l_per_min; ftissue_mid1oh is "tissue distribution mid1oh";
  fup_mid1oh = 0.106 dimensionless; fup_mid1oh is "fraction unbound in plasma mid1oh";
  BP_mid1oh = 1 dimensionless; BP_mid1oh is "blood to plasma ratio mid1oh";
  IVDOSE_mid1oh = 0 mg; IVDOSE_mid1oh is "IV bolus dose mid1oh [mg]";
  ti_mid1oh = 10 s; ti_mid1oh is "injection time mid1oh [s]";
  Ki_mid1oh has per_min; Ki_mid1oh is "Ki [1/min] injection mid1oh";
  Ri_mid1oh = 0 mg_per_min; Ri_mid1oh is "Ri [mg/min] rate of infusion mid1oh";
  cum_dose_mid1oh = 0 mg; cum_dose_mid1oh is "Cumulative dose due to infusion mid1oh";
  Qgu has l_per_min; Qgu is "gut blood flow";
  Qki has l_per_min; Qki is "kidney blood flow";
  Qh has l_per_min; Qh is "hepatic (venous side) blood flow";
  Qha has l_per_min; Qha is "hepatic artery blood flow";
  Qlu has l_per_min; Qlu is "lung blood flow";
  Qsp has l_per_min; Qsp is "spleen blood flow";
  Qpa has l_per_min; Qpa is "pancreas blood flow";
  Qre has l_per_min; Qre is "rest of body blood flow";
  Agu_blood_mid has mmole; Agu_blood_mid is "midazolam amount (gut)";
  Xgu_blood_mid has mg; Xgu_blood_mid is "midazolam amount (gut)";
  Mgu_blood_mid has mg_per_l; Mgu_blood_mid is "midazolam concentration (gut)";
  Aki_blood_mid has mmole; Aki_blood_mid is "midazolam amount (kidney)";
  Xki_blood_mid has mg; Xki_blood_mid is "midazolam amount (kidney)";
  Mki_blood_mid has mg_per_l; Mki_blood_mid is "midazolam concentration (kidney)";
  Ali_blood_mid has mmole; Ali_blood_mid is "midazolam amount (liver)";
  Xli_blood_mid has mg; Xli_blood_mid is "midazolam amount (liver)";
  Mli_blood_mid has mg_per_l; Mli_blood_mid is "midazolam concentration (liver)";
  Alu_blood_mid has mmole; Alu_blood_mid is "midazolam amount (lung)";
  Xlu_blood_mid has mg; Xlu_blood_mid is "midazolam amount (lung)";
  Mlu_blood_mid has mg_per_l; Mlu_blood_mid is "midazolam concentration (lung)";
  Apa_blood_mid has mmole; Apa_blood_mid is "midazolam amount (pancreas)";
  Xpa_blood_mid has mg; Xpa_blood_mid is "midazolam amount (pancreas)";
  Mpa_blood_mid has mg_per_l; Mpa_blood_mid is "midazolam concentration (pancreas)";
  Asp_blood_mid has mmole; Asp_blood_mid is "midazolam amount (spleen)";
  Xsp_blood_mid has mg; Xsp_blood_mid is "midazolam amount (spleen)";
  Msp_blood_mid has mg_per_l; Msp_blood_mid is "midazolam concentration (spleen)";
  Are_blood_mid has mmole; Are_blood_mid is "midazolam amount (rest)";
  Xre_blood_mid has mg; Xre_blood_mid is "midazolam amount (rest)";
  Mre_blood_mid has mg_per_l; Mre_blood_mid is "midazolam concentration (rest)";
  Aar_mid has mmole; Aar_mid is "midazolam concentration (arterial blood)";
  Xar_mid has mg; Xar_mid is "{s_name} amount ({c_name})";
  Mar_mid has mg_per_l; Mar_mid is "midazolam amount (arterial blood)";
  Ave_mid has mmole; Ave_mid is "midazolam concentration (venous blood)";
  Xve_mid has mg; Xve_mid is "{s_name} amount ({c_name})";
  Mve_mid has mg_per_l; Mve_mid is "midazolam amount (venous blood)";
  Xurine_mid has mg; Xurine_mid is "midazolam amount (urine)";
  Agu_blood_mid1oh has mmole; Agu_blood_mid1oh is "1-hydroxymidazolam amount (gut)";
  Xgu_blood_mid1oh has mg; Xgu_blood_mid1oh is "1-hydroxymidazolam amount (gut)";
  Mgu_blood_mid1oh has mg_per_l; Mgu_blood_mid1oh is "1-hydroxymidazolam concentration (gut)";
  Aki_blood_mid1oh has mmole; Aki_blood_mid1oh is "1-hydroxymidazolam amount (kidney)";
  Xki_blood_mid1oh has mg; Xki_blood_mid1oh is "1-hydroxymidazolam amount (kidney)";
  Mki_blood_mid1oh has mg_per_l; Mki_blood_mid1oh is "1-hydroxymidazolam concentration (kidney)";
  Ali_blood_mid1oh has mmole; Ali_blood_mid1oh is "1-hydroxymidazolam amount (liver)";
  Xli_blood_mid1oh has mg; Xli_blood_mid1oh is "1-hydroxymidazolam amount (liver)";
  Mli_blood_mid1oh has mg_per_l; Mli_blood_mid1oh is "1-hydroxymidazolam concentration (liver)";
  Alu_blood_mid1oh has mmole; Alu_blood_mid1oh is "1-hydroxymidazolam amount (lung)";
  Xlu_blood_mid1oh has mg; Xlu_blood_mid1oh is "1-hydroxymidazolam amount (lung)";
  Mlu_blood_mid1oh has mg_per_l; Mlu_blood_mid1oh is "1-hydroxymidazolam concentration (lung)";
  Apa_blood_mid1oh has mmole; Apa_blood_mid1oh is "1-hydroxymidazolam amount (pancreas)";
  Xpa_blood_mid1oh has mg; Xpa_blood_mid1oh is "1-hydroxymidazolam amount (pancreas)";
  Mpa_blood_mid1oh has mg_per_l; Mpa_blood_mid1oh is "1-hydroxymidazolam concentration (pancreas)";
  Asp_blood_mid1oh has mmole; Asp_blood_mid1oh is "1-hydroxymidazolam amount (spleen)";
  Xsp_blood_mid1oh has mg; Xsp_blood_mid1oh is "1-hydroxymidazolam amount (spleen)";
  Msp_blood_mid1oh has mg_per_l; Msp_blood_mid1oh is "1-hydroxymidazolam concentration (spleen)";
  Are_blood_mid1oh has mmole; Are_blood_mid1oh is "1-hydroxymidazolam amount (rest)";
  Xre_blood_mid1oh has mg; Xre_blood_mid1oh is "1-hydroxymidazolam amount (rest)";
  Mre_blood_mid1oh has mg_per_l; Mre_blood_mid1oh is "1-hydroxymidazolam concentration (rest)";
  Aar_mid1oh has mmole; Aar_mid1oh is "1-hydroxymidazolam concentration (arterial blood)";
  Xar_mid1oh has mg; Xar_mid1oh is "{s_name} amount ({c_name})";
  Mar_mid1oh has mg_per_l; Mar_mid1oh is "1-hydroxymidazolam amount (arterial blood)";
  Ave_mid1oh has mmole; Ave_mid1oh is "1-hydroxymidazolam concentration (venous blood)";
  Xve_mid1oh has mg; Xve_mid1oh is "{s_name} amount ({c_name})";
  Mve_mid1oh has mg_per_l; Mve_mid1oh is "1-hydroxymidazolam amount (venous blood)";
  Xurine_mid1oh has mg; Xurine_mid1oh is "1-hydroxymidazolam amount (urine)";
  dissolution_mid has mmole_per_min; dissolution_mid is "dissolution midazolam";
  inflow_li_mid1oh has mmole_per_min;
  outflow_li_mid1oh has mmole_per_min;
  KI__MID1OHEX_k = 1.302664 per_min; KI__MID1OHEX_k is "mid1oh transport rate constant (kidney)";
  LI__MIDIM_Vmax = 0.001465389 mmole_per_min_l; LI__MIDIM_Vmax is "Vmax mid transport (liver)";
  LI__MIDIM_Km = 0.01 mM; LI__MIDIM_Km is "Km mid transport (liver)";
  LI__MID1OHEX_Vmax = 0.04864275 mmole_per_min_l; LI__MID1OHEX_Vmax is "Vmax mid1oh transport (liver)";
  LI__MID1OHEX_Km = 0.01 mM; LI__MID1OHEX_Km is "Km mid1oh transport (liver)";
  LI__MIDOH_Vmax = 0.01049506 mmole_per_min_l; LI__MIDOH_Vmax is "Vmax mid to mid1oh conversion (liver)";
  LI__MIDOH_f = 1 dimensionless; LI__MIDOH_f is "scaling factor 'f' for mid to mid1oh conversion (liver)";
  GU__MIDIM_Vmax = 0.9884453 mmole_per_min_l; GU__MIDIM_Vmax is "Vmax mid transport (intestine)";
  GU__MIDIM_Km = 0.01 mM; GU__MIDIM_Km is "Km mid transport (intestine)";
  GU__MID1OHEX_Vmax = 2.378506e-6 mmole_per_min_l; GU__MID1OHEX_Vmax is "Vmax mid1oh transport (intestine)";
  GU__MID1OHEX_Km = 0.01 mM; GU__MID1OHEX_Km is "Km mid1oh transport (intestine)";
  GU__MIDOH_Vmax = 0.1129894 mmole_per_min_l; GU__MIDOH_Vmax is "Vmax mid to mid1oh conversion (intestine)";
  GU__MIDOH_f = 1 dimensionless; GU__MIDOH_f is "scaling factor 'f' for mid to mid1oh conversion (intestine)";

  // Assignment rules:
  FVre := 1 l_per_kg - (FVgu + FVki + FVli + FVlu + FVsp + FVpa + FVve + FVar);
  FQre := 1 - (FQki + FQh);
  BSA := 0.024265 m2*(BW/(1 kg))^0.5378*(HEIGHT/(1 cm))^0.3964;
  CO := BW*COBW + (HR - HRrest)*COHRI/(60 s_per_min);
  QC := CO/(1000 ml_per_l)*60 s_per_min;
  Vgu := BW*FVgu;
  Vki := BW*FVki;
  Vli := BW*FVli;
  Vlu := BW*FVlu;
  Vsp := BW*FVsp;
  Vpa := BW*FVpa;
  Vre := BW*FVre;
  Vve := BW*FVve - FVve/(FVar + FVve)*BW*Fblood*(1 l_per_kg - FVve - FVar);
  Var := BW*FVar - FVar/(FVar + FVve)*BW*Fblood*(1 l_per_kg - FVve - FVar);
  Qgu := QC*FQgu;
  Qki := QC*FQki;
  Qh := QC*FQh;
  Qha := Qh - Qgu - Qsp - Qpa;
  Qlu := QC*FQlu;
  Qsp := QC*FQsp;
  Qpa := QC*FQpa;
  Qre := QC*FQre;
  Vgu_tissue := Vgu*(1 - Fblood);
  Vgu_blood := Vgu*Fblood;
  Vki_tissue := Vki*(1 - Fblood);
  Vki_blood := Vki*Fblood;
  Vli_tissue := Vli*(1 - Fblood);
  Vli_blood := Vli*Fblood;
  Vlu_tissue := Vlu*(1 - Fblood);
  Vlu_blood := Vlu*Fblood;
  Vpa_tissue := Vpa*(1 - Fblood);
  Vpa_blood := Vpa*Fblood;
  Vsp_tissue := Vsp*(1 - Fblood);
  Vsp_blood := Vsp*Fblood;
  Vre_tissue := Vre*(1 - Fblood);
  Vre_blood := Vre*Fblood;
  Ki_mid := 0.693/ti_mid*60 s_per_min;
  Agu_blood_mid := Cgu_blood_mid*Vgu_blood;
  Xgu_blood_mid := Agu_blood_mid*Mr_mid;
  Mgu_blood_mid := Agu_blood_mid/Vgu_blood*Mr_mid;
  Aki_blood_mid := Cki_blood_mid*Vki_blood;
  Xki_blood_mid := Aki_blood_mid*Mr_mid;
  Mki_blood_mid := Aki_blood_mid/Vki_blood*Mr_mid;
  Ali_blood_mid := Cli_blood_mid*Vli_blood;
  Xli_blood_mid := Ali_blood_mid*Mr_mid;
  Mli_blood_mid := Ali_blood_mid/Vli_blood*Mr_mid;
  Alu_blood_mid := Clu_blood_mid*Vlu_blood;
  Xlu_blood_mid := Alu_blood_mid*Mr_mid;
  Mlu_blood_mid := Alu_blood_mid/Vlu_blood*Mr_mid;
  Apa_blood_mid := Cpa_blood_mid*Vpa_blood;
  Xpa_blood_mid := Apa_blood_mid*Mr_mid;
  Mpa_blood_mid := Apa_blood_mid/Vpa_blood*Mr_mid;
  Asp_blood_mid := Csp_blood_mid*Vsp_blood;
  Xsp_blood_mid := Asp_blood_mid*Mr_mid;
  Msp_blood_mid := Asp_blood_mid/Vsp_blood*Mr_mid;
  Are_blood_mid := Cre_blood_mid*Vre_blood;
  Xre_blood_mid := Are_blood_mid*Mr_mid;
  Mre_blood_mid := Are_blood_mid/Vre_blood*Mr_mid;
  Aar_mid := Car_mid*Var;
  Xar_mid := Aar_mid*Mr_mid;
  Mar_mid := Aar_mid/Var*Mr_mid;
  Ave_mid := Cve_mid*Vve;
  Xve_mid := Ave_mid*Mr_mid;
  Mve_mid := Ave_mid/Vve*Mr_mid;
  Xurine_mid := Aurine_mid*Mr_mid;
  Ki_mid1oh := 0.693/ti_mid1oh*60 s_per_min;
  Agu_blood_mid1oh := Cgu_blood_mid1oh*Vgu_blood;
  Xgu_blood_mid1oh := Agu_blood_mid1oh*Mr_mid1oh;
  Mgu_blood_mid1oh := Agu_blood_mid1oh/Vgu_blood*Mr_mid1oh;
  Aki_blood_mid1oh := Cki_blood_mid1oh*Vki_blood;
  Xki_blood_mid1oh := Aki_blood_mid1oh*Mr_mid1oh;
  Mki_blood_mid1oh := Aki_blood_mid1oh/Vki_blood*Mr_mid1oh;
  Ali_blood_mid1oh := Cli_blood_mid1oh*Vli_blood;
  Xli_blood_mid1oh := Ali_blood_mid1oh*Mr_mid1oh;
  Mli_blood_mid1oh := Ali_blood_mid1oh/Vli_blood*Mr_mid1oh;
  Alu_blood_mid1oh := Clu_blood_mid1oh*Vlu_blood;
  Xlu_blood_mid1oh := Alu_blood_mid1oh*Mr_mid1oh;
  Mlu_blood_mid1oh := Alu_blood_mid1oh/Vlu_blood*Mr_mid1oh;
  Apa_blood_mid1oh := Cpa_blood_mid1oh*Vpa_blood;
  Xpa_blood_mid1oh := Apa_blood_mid1oh*Mr_mid1oh;
  Mpa_blood_mid1oh := Apa_blood_mid1oh/Vpa_blood*Mr_mid1oh;
  Asp_blood_mid1oh := Csp_blood_mid1oh*Vsp_blood;
  Xsp_blood_mid1oh := Asp_blood_mid1oh*Mr_mid1oh;
  Msp_blood_mid1oh := Asp_blood_mid1oh/Vsp_blood*Mr_mid1oh;
  Are_blood_mid1oh := Cre_blood_mid1oh*Vre_blood;
  Xre_blood_mid1oh := Are_blood_mid1oh*Mr_mid1oh;
  Mre_blood_mid1oh := Are_blood_mid1oh/Vre_blood*Mr_mid1oh;
  Aar_mid1oh := Car_mid1oh*Var;
  Xar_mid1oh := Aar_mid1oh*Mr_mid1oh;
  Mar_mid1oh := Aar_mid1oh/Var*Mr_mid1oh;
  Ave_mid1oh := Cve_mid1oh*Vve;
  Xve_mid1oh := Ave_mid1oh*Mr_mid1oh;
  Mve_mid1oh := Ave_mid1oh/Vve*Mr_mid1oh;
  Xurine_mid1oh := Aurine_mid1oh*Mr_mid1oh;
  dissolution_mid := Ka_dis_mid/(60 min_per_hr)*PODOSE_mid/Mr_mid;
  inflow_li_mid1oh := Flow_gu_li_mid1oh + Flow_sp_li_mid1oh + Flow_pa_li_mid1oh + Flow_ar_li_mid1oh;
  outflow_li_mid1oh := Flow_li_ve_mid1oh;

  // Rate rules:
  PODOSE_mid' = -dissolution_mid*Mr_mid;
  GUTDOSE_mid' = F_mid*dissolution_mid*Mr_mid - absorption_mid*Mr_mid;
  IVDOSE_mid' = -iv_mid*Mr_mid + Ri_mid;
  cum_dose_mid' = Ri_mid;
  IVDOSE_mid1oh' = -iv_mid1oh*Mr_mid1oh + Ri_mid1oh;
  cum_dose_mid1oh' = Ri_mid1oh;

  // Reactions:
  transport_lu_mid: Clu_blood_mid -> Clu_mid; ftissue_mid*(Clu_blood_mid - Clu_mid); transport_lu_mid is "transport midazolam";
  transport_pa_mid: Cpa_blood_mid -> Cpa_mid; ftissue_mid*(Cpa_blood_mid - Cpa_mid); transport_pa_mid is "transport midazolam";
  transport_sp_mid: Csp_blood_mid -> Csp_mid; ftissue_mid*(Csp_blood_mid - Csp_mid); transport_sp_mid is "transport midazolam";
  transport_re_mid: Cre_blood_mid -> Cre_mid; ftissue_mid*(Cre_blood_mid - Cre_mid); transport_re_mid is "transport midazolam";
  iv_mid: => Cve_mid; Ki_mid*IVDOSE_mid/Mr_mid; iv_mid is "iv midazolam";
  absorption_mid: => Cgu_blood_mid; Ka_abs_mid/(60 min_per_hr)*GUTDOSE_mid/Mr_mid; absorption_mid is "absorption midazolam";
  Flow_ar_gu_mid: Car_mid => Cgu_blood_mid; Qgu*Car_mid; Flow_ar_gu_mid is "inflow gut midazolam";
  Flow_gu_li_mid: Cgu_blood_mid => Cli_blood_mid; Qgu*Cgu_blood_mid*BP_mid; Flow_gu_li_mid is "outflow gut midazolam";
  Flow_ar_ki_mid: Car_mid => Cki_blood_mid; Qki*Car_mid; Flow_ar_ki_mid is "inflow kidney midazolam";
  Flow_ki_ve_mid: Cki_blood_mid => Cve_mid; Qki*Cki_blood_mid*BP_mid; Flow_ki_ve_mid is "outflow kidney midazolam";
  Flow_ar_li_mid: Car_mid => Cli_blood_mid; Qha*Car_mid; Flow_ar_li_mid is "inflow liver midazolam";
  Flow_li_ve_mid: Cli_blood_mid => Cve_mid; Qh*Cli_blood_mid*BP_mid; Flow_li_ve_mid is "outflow liver midazolam";
  Flow_ve_lu_mid: Cve_mid => Clu_blood_mid; Qlu*Cve_mid; Flow_ve_lu_mid is "inflow lung midazolam";
  Flow_lu_ar_mid: Clu_blood_mid => Car_mid; Qlu*Clu_blood_mid*BP_mid; Flow_lu_ar_mid is "outflow lung midazolam";
  Flow_ar_pa_mid: Car_mid => Cpa_blood_mid; Qpa*Car_mid; Flow_ar_pa_mid is "inflow pancreas midazolam";
  Flow_pa_li_mid: Cpa_blood_mid => Cli_blood_mid; Qpa*Cpa_blood_mid*BP_mid; Flow_pa_li_mid is "outflow pancreas midazolam";
  Flow_ar_sp_mid: Car_mid => Csp_blood_mid; Qsp*Car_mid; Flow_ar_sp_mid is "inflow spleen midazolam";
  Flow_sp_li_mid: Csp_blood_mid => Cli_blood_mid; Qsp*Csp_blood_mid*BP_mid; Flow_sp_li_mid is "outflow spleen midazolam";
  Flow_ar_re_mid: Car_mid => Cre_blood_mid; Qre*Car_mid; Flow_ar_re_mid is "inflow rest midazolam";
  Flow_re_ve_mid: Cre_blood_mid => Cve_mid; Qre*Cre_blood_mid*BP_mid; Flow_re_ve_mid is "outflow rest midazolam";
  transport_lu_mid1oh: Clu_blood_mid1oh -> Clu_mid1oh; ftissue_mid1oh*(Clu_blood_mid1oh - Clu_mid1oh); transport_lu_mid1oh is "transport 1-hydroxymidazolam";
  transport_pa_mid1oh: Cpa_blood_mid1oh -> Cpa_mid1oh; ftissue_mid1oh*(Cpa_blood_mid1oh - Cpa_mid1oh); transport_pa_mid1oh is "transport 1-hydroxymidazolam";
  transport_sp_mid1oh: Csp_blood_mid1oh -> Csp_mid1oh; ftissue_mid1oh*(Csp_blood_mid1oh - Csp_mid1oh); transport_sp_mid1oh is "transport 1-hydroxymidazolam";
  transport_re_mid1oh: Cre_blood_mid1oh -> Cre_mid1oh; ftissue_mid1oh*(Cre_blood_mid1oh - Cre_mid1oh); transport_re_mid1oh is "transport 1-hydroxymidazolam";
  iv_mid1oh: => Cve_mid1oh; Ki_mid1oh*IVDOSE_mid1oh/Mr_mid1oh; iv_mid1oh is "iv 1-hydroxymidazolam";
  Flow_ar_gu_mid1oh: Car_mid1oh => Cgu_blood_mid1oh; Qgu*Car_mid1oh; Flow_ar_gu_mid1oh is "inflow gut 1-hydroxymidazolam";
  Flow_gu_li_mid1oh: Cgu_blood_mid1oh => Cli_blood_mid1oh; Qgu*Cgu_blood_mid1oh*BP_mid1oh; Flow_gu_li_mid1oh is "outflow gut 1-hydroxymidazolam";
  Flow_ar_ki_mid1oh: Car_mid1oh => Cki_blood_mid1oh; Qki*Car_mid1oh; Flow_ar_ki_mid1oh is "inflow kidney 1-hydroxymidazolam";
  Flow_ki_ve_mid1oh: Cki_blood_mid1oh => Cve_mid1oh; Qki*Cki_blood_mid1oh*BP_mid1oh; Flow_ki_ve_mid1oh is "outflow kidney 1-hydroxymidazolam";
  Flow_ar_li_mid1oh: Car_mid1oh => Cli_blood_mid1oh; Qha*Car_mid1oh; Flow_ar_li_mid1oh is "inflow liver 1-hydroxymidazolam";
  Flow_li_ve_mid1oh: Cli_blood_mid1oh => Cve_mid1oh; Qh*Cli_blood_mid1oh*BP_mid1oh; Flow_li_ve_mid1oh is "outflow liver 1-hydroxymidazolam";
  Flow_ve_lu_mid1oh: Cve_mid1oh => Clu_blood_mid1oh; Qlu*Cve_mid1oh; Flow_ve_lu_mid1oh is "inflow lung 1-hydroxymidazolam";
  Flow_lu_ar_mid1oh: Clu_blood_mid1oh => Car_mid1oh; Qlu*Clu_blood_mid1oh*BP_mid1oh; Flow_lu_ar_mid1oh is "outflow lung 1-hydroxymidazolam";
  Flow_ar_pa_mid1oh: Car_mid1oh => Cpa_blood_mid1oh; Qpa*Car_mid1oh; Flow_ar_pa_mid1oh is "inflow pancreas 1-hydroxymidazolam";
  Flow_pa_li_mid1oh: Cpa_blood_mid1oh => Cli_blood_mid1oh; Qpa*Cpa_blood_mid1oh*BP_mid1oh; Flow_pa_li_mid1oh is "outflow pancreas 1-hydroxymidazolam";
  Flow_ar_sp_mid1oh: Car_mid1oh => Csp_blood_mid1oh; Qsp*Car_mid1oh; Flow_ar_sp_mid1oh is "inflow spleen 1-hydroxymidazolam";
  Flow_sp_li_mid1oh: Csp_blood_mid1oh => Cli_blood_mid1oh; Qsp*Csp_blood_mid1oh*BP_mid1oh; Flow_sp_li_mid1oh is "outflow spleen 1-hydroxymidazolam";
  Flow_ar_re_mid1oh: Car_mid1oh => Cre_blood_mid1oh; Qre*Car_mid1oh; Flow_ar_re_mid1oh is "inflow rest 1-hydroxymidazolam";
  Flow_re_ve_mid1oh: Cre_blood_mid1oh => Cve_mid1oh; Qre*Cre_blood_mid1oh*BP_mid1oh; Flow_re_ve_mid1oh is "outflow rest 1-hydroxymidazolam";
  KI__MID1OHEX: Cki_blood_mid1oh => Aurine_mid1oh; KI__MID1OHEX_k*Vki_tissue*Cki_blood_mid1oh;
  LI__MIDIM: Cli_blood_mid -> LI__mid; LI__MIDIM_Vmax/LI__MIDIM_Km*Vli_tissue*(Cli_blood_mid - LI__mid)/(1 + Cli_blood_mid/LI__MIDIM_Km + LI__mid/LI__MIDIM_Km);
  LI__MID1OHEX: LI__mid1oh -> Cli_blood_mid1oh; LI__MID1OHEX_Vmax/LI__MID1OHEX_Km*Vli_tissue*(LI__mid1oh - Cli_blood_mid1oh)/(1 + LI__mid1oh/LI__MID1OHEX_Km + Cli_blood_mid1oh/LI__MID1OHEX_Km);
  LI__MIDOH: LI__mid => LI__mid1oh; LI__MIDOH_Vmax*Vli_tissue*LI__MIDOH_f*LI__mid/(LI__mid + MIDOH_Km);
  GU__MIDIM: Cgu_blood_mid -> GU__mid; GU__MIDIM_Vmax/GU__MIDIM_Km*Vgu_tissue*(Cgu_blood_mid - GU__mid)/(1 + Cgu_blood_mid/GU__MIDIM_Km + GU__mid/GU__MIDIM_Km);
  GU__MID1OHEX: GU__mid1oh -> Cgu_blood_mid1oh; GU__MID1OHEX_Vmax/GU__MID1OHEX_Km*Vgu_tissue*(GU__mid1oh - Cgu_blood_mid1oh)/(1 + GU__mid1oh/GU__MID1OHEX_Km + Cgu_blood_mid1oh/GU__MID1OHEX_Km);
  GU__MIDOH: GU__mid => GU__mid1oh; GU__MIDOH_Vmax*GU__MIDOH_f*Vgu_tissue*GU__mid/(GU__mid + MIDOH_Km);

  // Unit definitions:
  unit mmole = 1e-3 mole;
  unit min = 60 second;
  unit m = metre;
  unit m2 = metre^2;
  unit mM = 1e-3 mole / litre;
  unit mmole_per_min = 1e-3 mole / (60 second);
  unit per_min = 1 / (60 second);
  unit mmole_per_min_l = 1e-3 mole / (60 second * litre);
  unit litre_per_min = litre / (60 second);
  unit kg = kilogram;
  unit s = second;
  unit mg = 1e-3 gram;
  unit ml = 1e-3 litre;
  unit hr = 3600 second;
  unit per_hr = 1 / (3600 second);
  unit cm = 0.01 metre;
  unit mg_per_l = 1e-3 gram / litre;
  unit mg_per_g = 1e-3 gram / gram;
  unit mg_per_hr = 1e-3 gram / (3600 second);
  unit l_per_min = litre / (60 second);
  unit l_per_hr = litre / (3600 second);
  unit l_per_kg = litre / (1000 gram);
  unit l_per_ml = litre / (1e-3 litre);
  unit g_per_mole = gram / mole;
  unit m2_per_kg = metre^2 / (1000 gram);
  unit mg_per_min = 1e-3 gram / (60 second);
  unit mmole_per_hr = 1e-3 mole / (3600 second);
  unit mmole_per_l = 1e-3 mole / litre;
  unit mmole_per_min_kg = 1e-3 mole / (60 second * 1000 gram);
  unit mmole_per_hr_ml = 1e-3 mole / (3600 second * 1e-3 litre);
  unit ml_per_s = 1e-3 litre / second;
  unit ml_per_s_kg = 1e-3 litre / (second * 1000 gram);
  unit ml_per_l = 1e-3 litre / litre;
  unit mulitre_per_g = 1e-6 litre / gram;
  unit mul_per_min_mg = 1e-6 litre / (60 second * 1e-3 gram);
  unit min_per_hr = 60 second / (3600 second);
  unit s_per_min = second / (60 second);
end
